OpenVSP model (file version 5), 3 components.
Geometry view with OpenVSP parameter names; values to 6 digits, angles in degrees, lengths in the model's unit.
Overall bounding box: X_Min=2.6587 X_Len=6.12097 Y_Min=-8 Y_Len=16 Z_Min=1.35333 Z_Len=2.13327

Wing "wing"
  location (X Y Z) 2.6587 0 1.45, rotation 0 0 0
  symmetric about XZ
  bounding box size 1.93233 16 0.193345
  totals: TotalSpan=16 TotalProjectedSpan=16 TotalChord=1.14281 TotalArea=18.2849 TotalAR=14.0006
  root: chord 1.93233, twist 0, NACA 4-series Camber=0 CamberLoc=0.2 ThickChord=0.1
  sections:
    n  Span  Root_Chord  Tip_Chord  Area     Sweep  Sweep_Location  Dihedral  Twist  Twist_Location  tip airfoil
    1  8     1.93233     0.35329    9.14246  0      0.981818        0         0      0.25            as above

Wing "horizontal tail", child of "wing"
  location (X Y Z) 7.82946 0 3.44957, rotation 0 0 0
  symmetric about XZ
  bounding box size 0.950208 4 0.074043
  totals: TotalSpan=4 TotalProjectedSpan=4 TotalChord=0.74 TotalArea=2.96 TotalAR=5.40541
  root: chord 0.74, twist 0, NACA 4-series Camber=0 CamberLoc=0.2 ThickChord=0.1
  sections:
    n  Span  Root_Chord  Tip_Chord  Area  Sweep  Sweep_Location  Dihedral  Twist  Twist_Location  tip airfoil
    1  2     0.74        0.74       1.48  6      0.25            0         0      0.25            as above

Wing "Vertical tail"
  location (X Y Z) 7.5 0 1.40833, rotation 90 0 0
  bounding box size 0.957451 0.0958006 2.04124
  totals: TotalSpan=2.04124 TotalProjectedSpan=2.04124 TotalChord=0.773389 TotalArea=1.57867 TotalAR=2.63934
  root: chord 0.957451, twist 0, NACA 4-series Camber=0 CamberLoc=0.2 ThickChord=0.1
  sections:
    n  Span     Root_Chord  Tip_Chord  Area     Sweep  Sweep_Location  Dihedral  Twist  Twist_Location  tip airfoil
    1  2.04124  0.957451    0.589328   1.57867  0      0.995455        0         0      0.25            as above

VSPAERO settings: Sref=18.2849 bref=16 cref=1.14281 Xcg=4.19539 Ycg=0 Zcg=1.60103 AlphaStart=0 AlphaEnd=10 AlphaNpts=5 BetaStart=0 BetaEnd=0 BetaNpts=1 MachStart=0.3 MachEnd=0 MachNpts=1 ReCref=1e+07 Vinf=100 Rho=0.002377
